*NODE
1, 0.000000E+00, 0.000000E+00, 1.000000E+01
2, 0.000000E+00, 1.000000E+01, 1.000000E+01
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*NSET,NSET=PART-6-1_SET-1,GENERATE
1,391
*NSET,NSET=SET-1
1,8,11,14,22,26
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*NSET,NSET=SET-2
4,7,9,10,19,23
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*ELEMENT,TYPE=C3D8
209,675,676,1138,1138,1249,1248,1245,1245
210,1089,1091,1090,1090,1467,1465,1466,1466
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*ELSET,ELSET=SET-1,GENERATE
1,208
*ELSET,ELSET=SET-1_1
43,44,49,117,132,149,190,198
*ELSET,ELSET=SET-2
7,108,111,141,143,146,153,208
*MATERIAL,NAME=MATERIAL-1
*DENSITY
0
*ELASTIC
2E+08,0.3
*MATERIAL,NAME=MATERIAL-2
*DENSITY
0
*ELASTIC
4E+03,0.3
*MATERIAL,NAME=UEL
*DENSITY
0
*ELASTIC
3.67E-39,0
*MATERIAL,NAME=CZM
*DENSITY
0
*ELASTIC
4E+03,0.3
*SOLID SECTION,ELSET=SET-1,MATERIAL=MATERIAL-1
