*Heading
** Job name: dcbenf Model name: Model-1
** Generated by: Abaqus/CAE 2019
*Preprint, echo=NO, model=NO, history=NO, contact=NO
**
** PARTS
**
*Part, name=blockpart
*End Part
**
**
** ASSEMBLY
**
*Assembly, name=Assembly
**
*Instance, name=blockpart-1, part=blockpart
*Node
      1,           1.,           0.,           0.
      2,           0.,           0.,           0.
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*Element, type=C3D15
 1,   2,   1,  17,   6,   5,  55, 171, 170, 169, 172, 173, 174, 176, 175, 177
 2,  31,  30,  40,  69,  68,  78, 180, 179, 178, 181, 182, 183, 185, 184, 186
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*Nset, nset=topBlock, generate
   1,  618,    1
*Elset, elset=topBlock, generate
   1,  120,    1
*Nset, nset=botBlock, generate
   1,  618,    1
*Elset, elset=botBlock, generate
   1,  120,    1
*Nset, nset=czm, generate
   1,  618,    1
*Elset, elset=czm, generate
   1,  120,    1
** Section: czm
*Solid Section, elset=czm, material=czm
,
*End Instance
**
*End Assembly
**
** MATERIALS
**
*Material, name=czm
*Elastic
1.,1.
*Material, name=steel
*Elastic
1.,1.
